// SBML level 2 version 4

model New_Model()

  // Compartments:
  compartment Intracellular = 1;

  // Species:
  species Glucose in Intracellular = 100;
  species Oxygen in Intracellular = 100;
  species Energy in Intracellular = 450;
  species Lactate in Intracellular = 0;
  species apoptosis_rate in Intracellular = 0;
  species migration_speed in Intracellular = 0;
  species Lac_Secretion_Rate in Intracellular = 0;
  species Transition_Rat in Intracellular = 0;

  // Parameters:
  k_aer = 0.01;
  k_ane = 0.00018;
  energy_move_thresh = 440;
  energy_death_thresh = 430;
  energy_prolif_thresh = 445;
  k_usage = 0.0023;

  // Reactions:
  Aerobic: Glucose + 6 Oxygen => 38 Energy; Intracellular*k_aer*Glucose*Oxygen^6;
  Anaerobic: Glucose => 2 Energy + Lactate; Intracellular*k_ane*Glucose;
  Energy_Usage: Energy => ; Intracellular*k_usage*Energy;

  // Events:
  die: at (Energy < energy_death_thresh): apoptosis_rate = 0.0166;
  move: at (Energy < energy_move_thresh): migration_speed = 20;
  do_not_move: at (Energy > energy_move_thresh): migration_speed = 0;

  // Unit definitions:
  unit length = metre;
  unit area = metre^2;
  unit volume = 1e-3 litre;
  unit time = second;
  unit substance = 1e-3 mole;
end
